<?xml version="1.0" ?>
<Node dt="0.005" gravity="0 -10 0">
    <RequiredPlugin name="Sofa.Component.IO.Mesh"/> <!-- Needed to use components [MeshGmshLoader] -->
    <RequiredPlugin name="Sofa.Component.LinearSolver.Iterative"/> <!-- Needed to use components [CGLinearSolver] -->
    <RequiredPlugin name="Sofa.Component.Mass"/> <!-- Needed to use components [UniformMass] -->
    <RequiredPlugin name="Sofa.Component.IntegrationSchemes.Backward"/> <!-- Needed to use components [EulerImplicitIntegrationScheme] -->
    <RequiredPlugin name="Sofa.Component.StateContainer"/> <!-- Needed to use components [MechanicalObject] -->
    <RequiredPlugin name="Sofa.Component.Visual"/> <!-- Needed to use components [VisualStyle] -->
    <RequiredPlugin name="Sofa.GL.Component.Rendering3D"/> <!-- Needed to use components [OglModel] -->
    <RequiredPlugin name="SofaSphFluid"/> <!-- Needed to use components [SPHFluidForceField SPHFluidSurfaceMapping SpatialGridContainer] -->

    <VisualStyle displayFlags="showBehaviorModels showForceFields" />

    <DefaultAnimationLoop/>
    <Node name="Liver">
        <EulerImplicitIntegrationScheme name="cg_odesolver" printLog="false"  rayleighStiffness="0.1" rayleighMass="0.1" />
        <CGLinearSolver iterations="25" name="linear solver" tolerance="1.0e-9" threshold="1.0e-9" />
        <MeshGmshLoader name="loader" filename="mesh/liver.msh" />
        <MechanicalObject src="@loader" name="dofs" />
        <UniformMass name="M1" vertexMass="1" />
        <SPHFluidForceField radius="0.75" density="15" viscosity="10" pressure="1000" surfaceTension="-1000" />
        <SpatialGridContainer />
        <Node id="Visual">
            <OglModel name="VModel" color="blue" />
            <SPHFluidSurfaceMapping name="MarchingCube" input="@../dofs" output="@VModel" isoValue="0.5" radius="0.75" step="0.25" />
        </Node>
    </Node>
</Node>
