<?xml version="1.0" ?>
<Node dt="0.01" gravity="0 -10 0" bbox="-4 -4 -4 4 4 4">
    <RequiredPlugin name="Sofa.Component.Collision.Detection.Algorithm"/> <!-- Needed to use components [BVHNarrowPhase BruteForceBroadPhase CollisionPipeline] -->
    <RequiredPlugin name="Sofa.Component.Collision.Detection.Intersection"/> <!-- Needed to use components [NewProximityIntersection] -->
    <RequiredPlugin name="Sofa.Component.Collision.Geometry"/> <!-- Needed to use components [SphereCollisionModel] -->
    <RequiredPlugin name="Sofa.Component.Collision.Response.Contact"/> <!-- Needed to use components [CollisionResponse] -->
    <RequiredPlugin name="Sofa.Component.IO.Mesh"/> <!-- Needed to use components [MeshOBJLoader] -->
    <RequiredPlugin name="Sofa.Component.Mapping.Linear"/> <!-- Needed to use components [IdentityMapping] -->
    <RequiredPlugin name="Sofa.Component.Mass"/> <!-- Needed to use components [UniformMass] -->
    <RequiredPlugin name="Sofa.Component.IntegrationSchemes.Forward"/> <!-- Needed to use components [EulerExplicitIntegrationScheme] -->
    <RequiredPlugin name="Sofa.Component.StateContainer"/> <!-- Needed to use components [MechanicalObject] -->
    <RequiredPlugin name="Sofa.Component.Topology.Container.Constant"/> <!-- Needed to use components [MeshTopology] -->
    <RequiredPlugin name="Sofa.Component.Topology.Container.Dynamic"/> <!-- Needed to use components [PointSetTopologyContainer PointSetTopologyModifier] -->
    <RequiredPlugin name="Sofa.Component.Visual"/> <!-- Needed to use components [VisualStyle] -->
    <RequiredPlugin name="Sofa.GL.Component.Rendering3D"/> <!-- Needed to use components [OglModel] -->
    <RequiredPlugin name="SofaSphFluid"/> <!-- Needed to use components [OglFluidModel ParticleSink ParticleSource SPHFluidForceField SpatialGridContainer] -->
    <VisualStyle displayFlags="showVisual hideBehaviorModels hideForceFields hideWireframe" />

    <DefaultAnimationLoop/>
    <CollisionPipeline depth="15" verbose="0" draw="0" />
    <BruteForceBroadPhase/>
    <BVHNarrowPhase/>
    <NewProximityIntersection name="Proximity" alarmDistance="1.0" contactDistance="0.5" />
    <CollisionResponse name="Response" response="PenalityContactForceField" />

    <Node name="Particles">
        <EulerExplicitIntegrationScheme symplectic="1" />
        <MechanicalObject name="MModel" />
        <ParticleSource name="Source" translation="0 10 0" radius="0.01 0.1 0.01" velocity="0 -10 0" delay="0.02" start="-0.1" stop="4" printLog="0"
        center="-0.375 0 -0.75
            0.0 0.0 -0.75
            0.375 0.0 -0.75
            -0.75  0.0 -0.375
            -0.375 0.0 -0.375
            0.0 0.0 -0.375
            0.375 0.0 -0.375
            0.75 0.0 -0.375
            -0.75 0.0 0.0
            -0.375 0.0 0.0
            0.0 0.0 0.0
            0.375 0.0 0.0
            0.75 0.0 0.0
            -0.75 0.0 0.375
            -0.375 0.0 0.375
            0.0 0.0 0.375
            0.375 0.0 0.375
            0.75 0.0 0.375
            -0.375 0.0 0.75
            0.0 0.0 0.75
            0.375 0.0 0.75"  />


        <PointSetTopologyContainer name="con" />
        <PointSetTopologyModifier name="mod" />
        <UniformMass name="M1" vertexMass="1.0" />
        <SpatialGridContainer cellWidth="0.75" />
        <SPHFluidForceField radius="0.7" density="25" kernelType="1" viscosityType="2" viscosity="10" pressure="1000" surfaceTension="-1000" printLog="0" />

        <ParticleSink name="sink" normal="0 1 0" d0="-3.5" d1="-4" showPlane="1" printLog="0" />
        <Node name="Collision">
            <MechanicalObject />
            <SphereCollisionModel radius="0.05" showImpostors="true" />
            <IdentityMapping />
        </Node>
        <Node name="Fluid" >
            <OglFluidModel template="Vec3d" position="@../MModel.position"
            debugFBO="9"
            spriteRadius="0.5" spriteThickness="0.04" spriteBlurRadius="10" spriteBlurScale="10" spriteBlurDepthFalloff="1"  />
        </Node>
    </Node>


    <Node name="Obstacle" >
        <MeshOBJLoader name='loader' filename='mesh/dragon.obj' scale3d="0.5 0.5 0.5" translation="0 0 1"/>
        <Node name="Collision" >
            <MeshTopology src="@../loader" />
            <MechanicalObject src="@../loader" />
            <TriangleCollisionModel contactStiffness="50"/>
        </Node>
        <Node name="Visual" >
            <OglModel src="@../loader" />
        </Node>
    </Node>

</Node>
