<?xml version="1.0" ?>
<Node dt="0.01" gravity="0 -10 0" bbox="-4 -4 -4 4 4 4">
    <RequiredPlugin name="Sofa.Component.Mass"/> <!-- Needed to use components [UniformMass] -->
    <RequiredPlugin name="Sofa.Component.MechanicalLoad"/> <!-- Needed to use components [PlaneForceField] -->
    <RequiredPlugin name="Sofa.Component.IntegrationSchemes.Forward"/> <!-- Needed to use components [EulerExplicitIntegrationScheme] -->
    <RequiredPlugin name="Sofa.Component.StateContainer"/> <!-- Needed to use components [MechanicalObject] -->
    <RequiredPlugin name="Sofa.Component.Topology.Container.Dynamic"/> <!-- Needed to use components [PointSetTopologyContainer PointSetTopologyModifier] -->
    <RequiredPlugin name="Sofa.Component.Visual"/> <!-- Needed to use components [VisualStyle] -->
    <RequiredPlugin name="SofaSphFluid"/> <!-- Needed to use components [ParticleSource SPHFluidForceField SpatialGridContainer] -->
    <VisualStyle displayFlags="showBehaviorModels showForceFields" />

    <DefaultAnimationLoop/>
    <Node name="Particles">
        <EulerExplicitIntegrationScheme symplectic="1" />
        <MechanicalObject name="MModel" />
        <ParticleSource name="Source" translation="0 10 0" radius="0.01 0.1 0.01" velocity="0 -10 0" delay="0.02" start="-0.1" stop="4" addNoise="0"
        center="-0.375 0 -0.75
            0.0 0.0 -0.75
            0.375 0.0 -0.75
            -0.75  0.0 -0.375
            -0.375 0.0 -0.375
            0.0 0.0 -0.375
            0.375 0.0 -0.375
            0.75 0.0 -0.375
            -0.75 0.0 0.0
            -0.375 0.0 0.0
            0.0 0.0 0.0
            0.375 0.0 0.0
            0.75 0.0 0.0
            -0.75 0.0 0.375
            -0.375 0.0 0.375
            0.0 0.0 0.375
            0.375 0.0 0.375
            0.75 0.0 0.375
            -0.375 0.0 0.75
            0.0 0.0 0.75
            0.375 0.0 0.75"  />

        <UniformMass name="M1" vertexMass="1.0" />
        <PointSetTopologyContainer name="con" />
        <PointSetTopologyModifier name="mod" />

        <SpatialGridContainer cellWidth="0.75" />
        <SPHFluidForceField radius="0.7" density="25" kernelType="1" viscosityType="2" viscosity="10" pressure="1000" surfaceTension="-1000" printLog="0" />

        <PlaneForceField normal="1 0 0" d="-4" showPlane="1" />
        <PlaneForceField normal="-1 0 0" d="-4" showPlane="1" />
        <PlaneForceField normal="0.5 1 0.1" d="-4" showPlane="1" />
        <PlaneForceField normal="0 0 1" d="-4" showPlane="1" />
        <PlaneForceField normal="0 0 -1" d="-4" showPlane="1" />
    </Node>
</Node>
